f_c := 250 kgf/cm^2 = 24.5166 MPa
f_y := 4200 kgf/cm^2
ε_cu := 0.003
ε_y := 0.0021
h := 50 cm
b := 30 cm
rec := 4 cm
d := h - rec
d = 46 cm
# Flexión
M_u := 26.22 tonnef*m
β_1 :=
    if f_c < 300 kgf/cm^2
        0.85
    else if f_c > 550 kgf/cm^2
        0.65
    else
        0.85 - 0.008*(f_c/MPa - 30)
β_1 = 0.85
solve block
    # guess values
    ρ := 0.001
    ϕ := 0.9
    # constraints
    M_u/(b*d^2) == ϕ*ρ*f_y*(1 - 0.588*ρ*f_y/f_c)
    # solver
    NL := Find(ρ)
end solve block
ρ := NL
ρ = 0.0124609
ρ_min := max(0.25*sqrt(25)/420, 1.4 MPa/(420 MPa))
ρ_min = 0.00333333
ρ_b := 0.85*β_1*f_c/f_y*ε_cu/(ε_cu + ε_y)
ρ_b = 0.0252976
ρ_max := 0.75*ρ_b
ρ_max = 0.0189732
ρ_req := max(min(ρ, ρ_max), ρ_min)
ρ_req = 0.0124609
A_s_req := ρ_req*b*d
A_s_req = 17.1961 cm^2
4*ϕ25
A_s := 4*π*(25 mm/2)^2 = 19.635 cm^2
# Corte
ϕ := 0.75
V_u := 16.17 tonnef
f_yt := 420 MPa
f_c = 250 kgf/cm^2
V_c := 0.53*sqrt(f_c kgf/cm^2)*b*d
V_c = 11.5644 tonnef
b = 30 cm
d = 46 cm
(V_u/ϕ - V_c)/(f_yt*d*2) = 2.53682 cm^2/m
s := 20 cm
ϕ_v := 10 mm
n := 2
A_v := n*ϕ_v^2*π/4
A_v = 1.5708 cm^2
V_s := min(A_v*f_y*d/s, 0.66*sqrt(f_c*MPa)*b*d)
V_s = 15.1739 tonnef
V_n := V_c + V_s
V_n = 26.7383 tonnef
ϕ*V_n = 20.0538 tonnef
