f_c := 350 kgf/cm^2
f_y := 4200 kgf/cm^2
ε_cu := 0.003
ε_y := 0.0021
h := 168 cm
b := 25 cm
rec := 4 cm
d := h - rec
d = 164 cm
# Flexión
M_u := 21.70 tonnef*m
β_1 :=
    if f_c < 300 kgf/cm^2
        0.85
    else if f_c > 550 kgf/cm^2
        0.65
    else
        0.85 - 0.008*(f_c/MPa - 30)
β_1 = 0.815414
solve block
    # guess values
    ρ := 0.001
    ϕ := 0.9
    # constraints
    M_u/(b*d^2) == ϕ*ρ*f_y*(1 - 0.588*ρ*f_y/f_c)
    # solver
    NL := Find(ρ)
end solve block
ρ := NL
ρ = 0.000858975
ρ_min := max(0.25*sqrt(25)/420, 1.4 MPa/(420 MPa))
ρ_min = 0.00333333
ρ_b := 0.85*β_1*f_c/f_y*ε_cu/(ε_cu + ε_y)
ρ_b = 0.0339756
ρ_max := 0.75*ρ_b
ρ_max = 0.0254817
ρ_req := max(min(ρ, ρ_max), ρ_min)
ρ_req = 0.00333333
A_s_req := ρ_req*b*d/1
A_s_req = 13.6667 cm^2
3*ϕ25
A_s := 3*π*(25/2)^2 = 14726216 cm^2/m^2
# Corte
ϕ := 0.75
V_u := 29.58 tonnef
f_yt := 420 MPa
f_c = 350 kgf/cm^2
V_c := 0.53*sqrt(f_c kgf/cm^2)*b*d
V_c = 40.6531 tonnef
b = 25 cm
d = 164 cm
(V_u/ϕ - V_c)/(f_yt*d*2) = -0.0863569 cm^2/m
# Armadura Mínima
s := 20 cm
ϕ_v := 10 mm
n := 2
A_v := n*ϕ_v^2*π/4
A_v = 1.5708 cm^2
V_s := min(A_v*f_y*d/s, 0.66*sqrt(f_c*MPa)*b*d)
V_s = 54.0982 tonnef
V_n := V_c + V_s
V_n = 94.7513 tonnef
ϕ*V_n = 71.0635 tonnef
