# Diseño de fundaciones
# MURO: F4X
σ_suelo_estatico := 8 kgf/cm^2
σ_suelo_sismico := 10 kgf/cm^2
chequeo(x) :=
    if x > 1
        "CUMPLE"
    else
        "REDISEÑAR"
# 1. Dimensiones elementos
# Propiedades y esfuerzos de muro: | Dimensiones zapata:
L_muro := 6.76 m
L_zap := 60 cm + L_muro + 60 cm = 7.96 m
e_muro := 25 cm
B_zap := 140 cm
resistencia(x, y) :=
    if x > y
        "CUMPLE"
    else
        "REDISEÑAR"
γ_H := 2.5 tonnef/m^3
H_zap := 200 cm
N_zap := γ_H*B_zap*L_zap*H_zap = 55.72 tonnef
# 2. Esfuerzos de ETABS
N_PP := -415.9831 tonnef
M_PP := -176.3241 tonnef*m
V_PP := 26.6489 tonnef
N_SC := -118.0962 tonnef
M_SC := -20.3411 tonnef*m
V_SC := -1.0577 tonnef
N_SX := 216.7196 tonnef
M_SX := 522.4481 tonnef*m
V_SX := 27.6026 tonnef
N_SY := 157.9424 tonnef
M_SY := 59.8586 tonnef*m
V_SY := 8.2291 tonnef
# 3. Combinaciones
# 3.1. Combinaciones estáticas
# Combinación 1 (PP)
N_est1 := N_zap + |N_PP| = 471.703 tonnef
V_est1 := V_PP = 26.6489 tonnef
M_est1 := M_PP = -176.324 tonnef*m
l := L_zap/6 = 1.32667 m
e := |M_est1/N_est1| = 0.373803 m
L' := 3*(L_zap/2 - e) = 10.8186 m
σ_est1 :=
    if e < l
        max(N_est1/(B_zap*L_zap) + 6*M_est1/(B_zap*L_zap^2), N_est1/(B_zap*L_zap) - 6*M_est1/(B_zap*L_zap^2))
    else if e == l
        2*N_est1/(B_zap*L_zap)
    else
        2*N_est1/(B_zap*L')
    = 5.42544 kgf/cm^2
# Factores de seguridad
μ := 0.4
F_D := V_est1 = 26.6489 tonnef
F_R := N_est1*μ = 188.681 tonnef
FS_D := |F_R|/|F_D| = 7.08026
M_V := M_est1 + V_est1*H_zap = -123.026 tonnef*m
M_R := N_est1*L_zap/2 + M_est1 = 1701.05 tonnef*m
FS_V := |M_R|/|M_V| = 13.8268
chequeo(FS_D) = "CUMPLE"
chequeo(FS_V) = "CUMPLE"
# Combinación 2 (PP+SC)
N_est2 := N_zap + |N_PP| + |N_SC| = 589.799 tonnef
V_est2 := V_PP + V_SC = 25.5912 tonnef
M_est2 := M_PP + M_SC = -196.665 tonnef*m
l := L_zap/6 = 1.32667 m
e := |M_est2/N_est2| = 0.333444 m
L' := 3*(L_zap/2 - e) = 10.9397 m
σ_est2 :=
    if e < l
        max(N_est2/(B_zap*L_zap) + 6*M_est2/(B_zap*L_zap^2), N_est2/(B_zap*L_zap) - 6*M_est2/(B_zap*L_zap^2))
    else if e == l
        2*N_est2/(B_zap*L_zap)
    else
        2*N_est2/(B_zap*L')
    = 6.62275 kgf/cm^2
σ_est := max(σ_est1, σ_est2) = 6.62275 kgf/cm^2
resistencia(σ_suelo_estatico, σ_est) = "CUMPLE"
# Factores de seguridad
μ := 0.4
F_D := V_est2 = 25.5912 tonnef
F_R := N_est2*μ = 235.92 tonnef
FS_D := |F_R|/|F_D| = 9.21878
M_V := M_est2 + V_est2*H_zap = -145.483 tonnef*m
M_R := N_est2*L_zap/2 + M_est2 = 2150.74 tonnef*m
FS_V := |M_R|/|M_V| = 14.7834
chequeo(FS_D) = "CUMPLE"
chequeo(FS_V) = "CUMPLE"
# 3.2. Combinaciones sísmicas
# Combinación 3,1 (PP+SX)
N_sis := N_zap + |N_PP| + N_SX = 688.423 tonnef
V_sis := V_PP + V_SX = 54.2515 tonnef
M_sis := M_PP + M_SX = 346.124 tonnef*m
l := L_zap/6 = 1.32667 m
e := |M_sis/N_sis| = 0.502778 m
L' := 3*(L_zap/2 - e) = 10.4317 m
σ_sis31 :=
    if e < l
        max(N_sis/(B_zap*L_zap) + 6*M_sis/(B_zap*L_zap^2), N_sis/(B_zap*L_zap) - 6*M_sis/(B_zap*L_zap^2))
    else if e == l
        2*N_sis/(B_zap*L_zap)
    else
        2*N_sis/(B_zap*L')
    = 8.51867 kgf/cm^2
# Factores de seguridad
μ := 0.4
F_D := V_sis = 54.2515 tonnef
F_R := N_sis*μ = 275.369 tonnef
FS_D := |F_R|/|F_D| = 5.07579
M_V := M_sis + V_sis*H_zap = 454.627 tonnef*m
M_R := N_sis*L_zap/2 + M_sis = 3086.05 tonnef*m
FS_V := |M_R|/|M_V| = 6.78808
chequeo(FS_D) = "CUMPLE"
chequeo(FS_V) = "CUMPLE"
# Combinación 3,2 (PP-SX)
N_sis := N_zap + |N_PP| - N_SX = 254.983 tonnef
V_sis := V_PP - V_SX = -0.9537 tonnef
M_sis := M_PP - M_SX = -698.772 tonnef*m
l := L_zap/6 = 1.32667 m
e := |M_sis/N_sis| = 2.74046 m
L' := 3*(L_zap/2 - e) = 3.71862 m
σ_sis32 :=
    if e < l
        max(N_sis/(B_zap*L_zap) + 6*M_sis/(B_zap*L_zap^2), N_sis/(B_zap*L_zap) - 6*M_sis/(B_zap*L_zap^2))
    else if e == l
        2*N_sis/(B_zap*L_zap)
    else
        2*N_sis/(B_zap*L')
    = 9.79563 kgf/cm^2
# Factores de seguridad
μ := 0.4
F_D := V_sis = -0.9537 tonnef
F_R := N_sis*μ = 101.993 tonnef
FS_D := |F_R|/|F_D| = 106.945
M_V := M_sis + V_sis*H_zap = -700.68 tonnef*m
M_R := N_sis*L_zap/2 + M_sis = 316.062 tonnef*m
FS_V := |M_R|/|M_V| = 0.451079
chequeo(FS_D) = "CUMPLE"
chequeo(FS_V) = "REDISEÑAR"
# Combinación 4,1 (PP+0.75(SC+S))
N_sis := N_zap + |N_PP| + 0.75*|N_SC| + 0.75*N_SX = 722.815 tonnef
M_sis := M_PP + 0.75*M_SC + 0.75*M_SX = 200.256 tonnef*m
V_sis := V_PP + 0.75*(V_SC + V_SX) = 46.5576 tonnef
l := L_zap/6 = 1.32667 m
e := |M_sis/N_sis| = 0.27705 m
L' := 3*(L_zap/2 - e) = 11.1088 m
σ_sis41 :=
    if e < l
        max(N_sis/(B_zap*L_zap) + 6*M_sis/(B_zap*L_zap^2), N_sis/(B_zap*L_zap) - 6*M_sis/(B_zap*L_zap^2))
    else if e == l
        2*N_sis/(B_zap*L_zap)
    else
        2*N_sis/(B_zap*L')
    = 7.84065 kgf/cm^2
# Factores de seguridad
μ := 0.4
F_D := V_sis = 46.5576 tonnef
F_R := N_sis*μ = 289.126 tonnef
FS_D := |F_R|/|F_D| = 6.21007
M_V := M_sis + V_sis*H_zap = 293.371 tonnef*m
M_R := N_sis*L_zap/2 + M_sis = 3077.06 tonnef*m
FS_V := |M_R|/|M_V| = 10.4886
chequeo(FS_D) = "CUMPLE"
chequeo(FS_V) = "CUMPLE"
# Combinación 4,2 (PP+0.75(SC-S))
N_sis := N_zap + |N_PP| + 0.75*|N_SC| - 0.75*N_SX = 397.736 tonnef
M_sis := M_PP + 0.75*M_SC - 0.75*M_SX = -583.416 tonnef*m
V_sis := V_PP + 0.75*(V_SC - V_SX) = 5.15367 tonnef
l := L_zap/6 = 1.32667 m
e := |M_sis/N_sis| = 1.46684 m
L' := 3*(L_zap/2 - e) = 7.53947 m
σ_sis42 :=
    if e < l
        max(N_sis/(B_zap*L_zap) + 6*M_sis/(B_zap*L_zap^2), N_sis/(B_zap*L_zap) - 6*M_sis/(B_zap*L_zap^2))
    else if e == l
        2*N_sis/(B_zap*L_zap)
    else
        2*N_sis/(B_zap*L')
    = 7.53626 kgf/cm^2
# Factores de seguridad
μ := 0.4
F_D := V_sis = 5.15367 tonnef
F_R := N_sis*μ = 159.094 tonnef
FS_D := |F_R|/|F_D| = 30.8701
M_V := M_sis + V_sis*H_zap = -573.109 tonnef*m
M_R := N_sis*L_zap/2 + M_sis = 999.571 tonnef*m
FS_V := |M_R|/|M_V| = 1.74412
chequeo(FS_D) = "CUMPLE"
chequeo(FS_V) = "CUMPLE"
# Combinación 5,1 (0.6PP+SX)
N_sis := 0.6*N_zap + 0.6*|N_PP| + N_SX = 499.741 tonnef
M_sis := 0.6*M_PP + M_SX = 416.654 tonnef*m
V_sis := 0.6*V_PP + V_SX = 43.5919 tonnef
l := L_zap/6 = 1.32667 m
e := |M_sis/N_sis| = 0.833738 m
L' := 3*(L_zap/2 - e) = 9.43878 m
σ_sis51 :=
    if e < l
        max(N_sis/(B_zap*L_zap) + 6*M_sis/(B_zap*L_zap^2), N_sis/(B_zap*L_zap) - 6*M_sis/(B_zap*L_zap^2))
    else if e == l
        2*N_sis/(B_zap*L_zap)
    else
        2*N_sis/(B_zap*L')
    = 7.3026 kgf/cm^2
# Factores de seguridad
μ := 0.4
F_D := V_sis = 43.5919 tonnef
F_R := N_sis*μ = 199.897 tonnef
FS_D := |F_R|/|F_D| = 4.58563
M_V := M_sis + V_sis*H_zap = 503.838 tonnef*m
M_R := N_sis*L_zap/2 + M_sis = 2405.62 tonnef*m
FS_V := |M_R|/|M_V| = 4.7746
chequeo(FS_D) = "CUMPLE"
chequeo(FS_V) = "CUMPLE"
# Combinación 5,2 (0.6PP-SX)
N_sis := 0.6*N_zap + 0.6*|N_PP| - N_SX = 66.3023 tonnef
M_sis := 0.6*M_PP - M_SX = -628.243 tonnef*m
V_sis := 0.6*V_PP - V_SX = -11.6133 tonnef
l := L_zap/6 = 1.32667 m
e := |M_sis/N_sis| = 9.47543 m
L' := 3*(L_zap/2 - e) = -16.4863 m
σ_sis52 :=
    if e < l
        max(N_sis/(B_zap*L_zap) + 6*M_sis/(B_zap*L_zap^2), N_sis/(B_zap*L_zap) - 6*M_sis/(B_zap*L_zap^2))
    else if e == l
        2*N_sis/(B_zap*L_zap)
    else
        2*N_sis/(B_zap*L')
    = -0.574523 kgf/cm^2
# Factores de seguridad
μ := 0.4
F_D := V_sis = -11.6133 tonnef
F_R := N_sis*μ = 26.5209 tonnef
FS_D := |F_R|/|F_D| = 2.28367
M_V := M_sis + V_sis*H_zap = -651.469 tonnef*m
M_R := N_sis*L_zap/2 + M_sis = -364.36 tonnef*m
FS_V := |M_R|/|M_V| = 0.559289
chequeo(FS_D) = "CUMPLE"
chequeo(FS_V) = "REDISEÑAR"
σ_sis := max(σ_sis31, σ_sis32, σ_sis41, σ_sis42, σ_sis51, σ_sis52) = 9.79563 kgf/cm^2
resistencia(σ_suelo_estatico, σ_est) = "CUMPLE"
# 4. Chequeo parrilla
# Momento lado corto | Momento Lado Largo
M1 := σ_sis*(B_zap/2)^2*1 m/2 = 23.9993 tonnef*m
M2 := σ_sis*((L_zap - L_muro)/2)^2*1 m/2 = 17.6321 tonnef*m
# Propiedad de la Sección de Zapata | Propiedad de la Sección de Zapata
W := 1/6*1 m*H_zap^2 = 0.666667 m^3
W := 1/6*1 m*H_zap^2 = 0.666667 m^3
M1/W = 3.59989 kgf/cm^2
M2/W = 2.64482 kgf/cm^2
if M1/W < 7 kgf/cm^2
    "No necesita parrilla"
else
    "Necesita Parrilla"
= "No necesita parrilla"
if M2/W < 7 kgf/cm^2
    "No necesita parrilla"
else
    "Necesita Parrilla"
= "No necesita parrilla"
